T := [1; .5; 1; 2; 1; .5; 1]
J := [1; 0; -1; 0; -1; 0; 1]
i := 0 .. last(T)
T'(t) :=
    n ← 0
    for t_n ∈ T
        if t > t_n
            R[n] ← t_n
            t ← t - t_n
            n ← n + 1
        else
            break
    R[n] ← t
    R
A(t) :=
    if t < 0 or t ≥ sum(T)
        a ← 0
    else
        a ← 0
        n ← 0
        for t_n ∈ T'(t)
            a ← J[n]*t_n + a
            n ← n + 1
    a
a := integral(j, t) + a_0 → j*t + a_0
v := integral(a, t) + v_0 → j*t^2/2 + a_0*t + v_0
p := integral(v, t) + p_0 → j*t^3/6 + a_0*t^2/2 + v_0*t + p_0
x := -1, -1 + 0.01 .. sum(T) + 1
# [plot: A(x) vs x]
V(t, v_in) :=
    a ← 0
    v ← v_in
    n ← 0
    for t_n ∈ T'(t)
        v ← J[n]*t_n^2/2 + a*t_n + v
        a ← J[n]*t_n + a
        n ← n + 1
    v
# [plot: V(x, 0) vs x]
P(t, v_in) :=
    a ← 0
    v ← v_in
    p ← 0
    n ← 0
    for t_n ∈ T'(t)
        p ← J[n]*t_n^3/6 + a*t_n^2/2 + v*t_n + p
        v ← J[n]*t_n^2/2 + a*t_n + v
        a ← J[n]*t_n + a
        n ← n + 1
    p
# [plot: P(x, 0) vs x]
J(t) :=
    if (t < 0) or (t ≥ sum(T))
        R ← 0
    else
        n ← 0
        for t_n ∈ T
            if t > t_n
                t ← t - t_n
                n ← n + 1
            else
                R ← J[n]
                break
    R
x := -1, -1 + 0.01 .. 8
# [plot: J(x) vs x]
a(t) := integral(j(t), t) → integral(j(t), t)
integral(J(t), t = 0 .. sum(T))  # error: Unable to evaluate a conditional expression.
v(t) := integral(a(t), t) + v_0 → integral(integral(j(t), t), t) + v_0
p(t) := integral(v(t), t) → integral(integral(integral(j(t), t), t) + v_0, t)
