a := integral(j, t) + a_0 → j*t + a_0
v := integral(a, t) + v_0 → j*t^2/2 + a_0*t + v_0
p := integral(v, t) + p_0 → j*t^3/6 + a_0*t^2/2 + v_0*t + p_0
f(t, j, a_0, v_0, p_0) := [j*t + a_0; j*t^2/2 + a_0*t + v_0; j*t^3/6 + a_0*t^2/2 + v_0*t + p_0]
