v_in + t_1*a + t_2*(-a) == v_out → (-t_2 + t_1)*a + v_in == v_out
t_1 - t_2 == (v_out - v_in)/a
t_2 == t_1 - (v_out - v_in)/a
integral(v_in + t_1*a, t_1) + integral(v_in + t_1*a + t_2*(-a), t_2) == p substitute, t_2 == t_1 - (v_out - v_in)/a → t_1^2*a + 2*t_1*v_in + (v_in^2/(2*a) - v_out^2/(2*a)) == p
t_1^2*a + 2*t_1*v_in + (v_in^2/(2*a) - v_out^2/(2*a)) == p solve, t_1, simplify → [
    sqrt(2*a^2*(2*a*p + v_out^2 + v_in^2))/(2*a^2) - v_in/a;
    -sqrt(2*a^2*(2*a*p + v_out^2 + v_in^2))/(2*a^2) - v_in/a
]
t_1(p) == sqrt(2*a*p + v_out^2 + v_in^2)/(sqrt(2)*a) - v_in/a
t_1(v) == (v - v_in)/a
t_1 == min(t_1(p), t_1(v))
t_2(t_1) == t_1 - (v_out - v_in)/a
p(t_1, t_2) == (t_1^2 - t_2^2)*a/2 + t_1*t_2*a + (t_1 + t_2)*v_in
p(t_3) == p(t_1, t_2) + t_3*v
p == integral(v_in + t_1*a, t_1) + integral(v_in + t_1*a + t_2*(-a), t_2) simplify → p == -(t_2^2 - t_1^2)*a/2 + t_1*t_2*a + (t_2 + t_1)*v_in
v_in := 10 mm/s
v_out := 20 mm/s
a := 1000 mm/s^2
p := 10 mm
t_1 := sqrt(2*a*p + v_out^2 + v_in^2)/(sqrt(2)*a) - v_in/a = 0.0912423 s
t_2 := t_1 - (v_out - v_in)/a = 0.0812423 s
-(t_2^2 - t_1^2)*a/2 + t_1*t_2*a + (t_2 + t_1)*v_in = 10 mm
v := v_in + t_1*a = 101.242 mm/s
